OpenVSP model (file version 5), 7 components.
Geometry view with OpenVSP parameter names; values to 6 digits, angles in degrees, lengths in the model's unit.
Overall bounding box: X_Min=0 X_Len=137.595 Y_Min=-85.2913 Y_Len=170.583 Z_Min=-7.98382 Z_Len=28.7375

Fuselage "Fuselage"
  location (X Y Z) 0 0 0, rotation 0 0 0
  bounding box size 124.75 12.3917 13.9766
  Design: Length=124.75
  cross sections:
    n  XLocPercent  YLocPercent  ZLocPercent  shape
    0  0            0            -0.0224449   point
    1  0.034519     0            -0.0202653   circle Circle_Diameter=7.87084
    2  0.080322     0            -0.00570973  ellipse Ellipse_Height=12.6535 Ellipse_Width=11.5257
    3  0.17         0            0            ellipse Ellipse_Height=13.875 Ellipse_Width=12.3917
    4  0.683918     0            0            as above
    5  0.9999       0            0.0161828    ellipse Ellipse_Height=2.6186 Ellipse_Width=1
    6  1            0            0.016183     point

Wing "Gear Pod", child of "Fuselage"
  location (X Y Z) 35.8 0 -5.25, rotation 0 0 0
  symmetric about XZ
  bounding box size 36.4381 25.2828 5.46764
  totals: TotalSpan=25.4552 TotalProjectedSpan=25.2828 TotalChord=16.751 TotalArea=462.647 TotalAR=1.38165
  root: chord 36.4381, twist 0, NACA 4-series Camber=0 CamberLoc=0.2 ThickChord=0.15
  sections:
    n  Span    Root_Chord  Tip_Chord  Area     Sweep   Sweep_Location  Dihedral  Twist  Twist_Location  tip airfoil
    1  4       36.4381     25.7539    124.384  -49.55  1               -2        0      0               NACA 4-series Camber=0 CamberLoc=0.5 ThickChord=0.167333
    2  6.3076  25.7539     5.41177    98.2902  -49.55  1               7         0      0               NACA 4-series Camber=0 CamberLoc=0.5 ThickChord=0.2
    3  2.42    5.41177     1.73633    8.6492   -49.55  1               10        0      0               NACA 63-series A=0 IdealCl=0 ThickChord=0.181

Wing "Wing"
  location (X Y Z) 47.231 0 6.9375, rotation 0 0 0
  symmetric about XZ
  bounding box size 24.559 170.583 2.83342
  totals: TotalSpan=170.641 TotalProjectedSpan=170.583 TotalChord=8.82534 TotalArea=1478 TotalAR=19.6877
  root: chord 10.7287, twist 0, CST airfoil ContLERad=1 LowDegree=7 Theta=-2 ThickChord=0.100743 UpDegree=7 Au=[0.116633 0.129633 0.0962581 0.178225 0.100198 0.270487 0.0504155 0.312117] Al=[-0.116633 -0.0444823 -0.217855 -0.0532403 -0.180318 -0.116214 -0.0979911 0.208136]
  sections:
    n  Span     Root_Chord  Tip_Chord  Area     Sweep    Sweep_Location  Dihedral  Twist    Twist_Location  tip airfoil
    1  42.6603  10.7287     9.72046    436.182  11.5119  0.25            -1.5      1        0               CST airfoil ContLERad=1 LowDegree=7 ThickChord=0.100743 UpDegree=7 Au=[0.116633 0.129633 0.0962581 0.178225 0.100198 0.270487 0.0504155 0.312117] Al=[-0.116633 -0.0444823 -0.217855 -0.0532403 -0.180318 -0.116214 -0.0979911 0.208136]
    2  6.63623  9.72046     9.51378    63.8214  11.5119  0.25            -1.5      0.84444  0               CST airfoil ContLERad=1 LowDegree=7 ThickChord=0.0990798 UpDegree=7 Au=[0.117452 0.126946 0.107896 0.156192 0.131792 0.25658 0.0628724 0.316064] Al=[-0.117452 -0.0368638 -0.21844 -0.0422431 -0.171153 -0.117923 -0.0801262 0.21693]
    3  36.024   9.51378     3.75492    238.996  14.0576  0.25            -1.5      0        0               as above

Wing "Htail"
  location (X Y Z) 122.905 0 20, rotation 0 0 0
  symmetric about XZ
  bounding box size 13.0887 38.4333 1.70028
  totals: TotalSpan=38.4861 TotalProjectedSpan=38.4333 TotalChord=7.69721 TotalArea=296.235 TotalAR=4.98631
  root: chord 11.4032, twist 0, NACA 4-series Camber=0 CamberLoc=0.5 ThickChord=0.09
  sections:
    n  Span    Root_Chord  Tip_Chord  Area     Sweep  Sweep_Location  Dihedral  Twist  Twist_Location  tip airfoil
    1  19.243  11.4032     3.99117    148.118  20.63  0.25            -3        0      0               as above

Wing "Vtail"
  location (X Y Z) 105.343 0 3.5, rotation 90 0 0
  bounding box size 32.2521 1.72637 17.2537
  totals: TotalSpan=17.2537 TotalProjectedSpan=17.2537 TotalChord=17.2537 TotalArea=297.69 TotalAR=1
  root: chord 17.2537, twist 0, NACA 4-series Camber=0 CamberLoc=0.5 ThickChord=0.1
  sections:
    n  Span     Root_Chord  Tip_Chord  Area    Sweep  Sweep_Location  Dihedral  Twist  Twist_Location  tip airfoil
    1  17.2537  17.2537     17.2537    297.69  41     0.25            0         0      0               as above

Wing "Jury"
  location (X Y Z) 60.1418 40.6661 0.485662, rotation 0 0 0
  symmetric about XZ
  bounding box size 1.62483 81.5468 5.44894
  totals: TotalSpan=10.8979 TotalProjectedSpan=1e-06 TotalChord=1.07042 TotalArea=11.6653 TotalAR=0
  root: chord 0.955833, twist 0, NACA 63-series A=0 IdealCl=0 ThickChord=0.181
  sections:
    n  Span     Root_Chord  Tip_Chord  Area     Sweep     Sweep_Location  Dihedral  Twist  Twist_Location  tip airfoil
    1  5.44894  0.955833    1.185      5.83264  -6.99949  0               90        0      0               as above

Wing "Strut"
  location (X Y Z) 55.573 12.6414 -4.2, rotation -5.90164 0 0
  symmetric about XZ
  bounding box size 10.6159 137.284 9.61246
  mass: Density=0.57 Shell_Flag=0 Mass_Area=1 Mass_Prior=1
  totals: TotalSpan=113.5 TotalProjectedSpan=109.463 TotalChord=3.21482 TotalArea=385.162 TotalAR=31.1096
  root: chord 1.73633, twist 0, NACA 63-series A=0 IdealCl=0 ThickChord=0.181
  sections:
    n  Span     Root_Chord  Tip_Chord  Area     Sweep    Sweep_Location  Dihedral  Twist  Twist_Location  tip airfoil
    1  5.675    1.73633     3.92575    16.0662  8.38277  0.5             15.3265   0      0               as above
    2  14.1875  3.92575     3.92575    55.6966  8.38277  0.5             15.3265   0      0               as above
    3  8.5125   3.92575     1.81183    24.4206  8.38277  0.5             15.3265   0      0               as above
    4  8.5125   1.81183     3.92575    24.4206  8.38277  0.5             15.3265   0      0               as above
    5  14.1875  3.92575     3.92575    55.6966  8.38277  0.5             15.3265   0      0               as above
    6  5.675    3.92575     1.81183    16.2804  8.38277  0.5             15.3265   0      0               as above

Parameter links (A drives B)
  Fuselage:XSec_3:Ellipse_Height -> Wing:XForm:Z_Location Scale=0.5
  Gear Pod:WingGeom:TotalProjectedSpan -> Strut:XForm:Y_Location Scale=0.5
  Strut:XSec_0:A -> Gear Pod:XSec_3:A Offset=0
  Strut:XSec_0:Chord -> Gear Pod:XSec_3:Chord Offset=0
  Strut:XSec_0:DeltaX -> Gear Pod:XSec_3:DeltaX Offset=0
  Strut:XSec_0:DeltaY -> Gear Pod:XSec_3:DeltaY Offset=0
  Strut:XSec_0:FitDegree -> Gear Pod:XSec_3:FitDegree Offset=0
  Strut:XSec_0:IdealCl -> Gear Pod:XSec_3:IdealCl Offset=0
  Strut:XSec_0:Invert -> Gear Pod:XSec_3:Invert Offset=0
  Strut:XSec_0:Scale -> Gear Pod:XSec_3:Scale Offset=0
  Strut:XSec_0:Series -> Gear Pod:XSec_3:Series Offset=0
  Strut:XSec_0:ShiftLE -> Gear Pod:XSec_3:ShiftLE Offset=0
  Strut:XSec_0:Theta -> Gear Pod:XSec_3:Theta Offset=0
  Gear Pod:XSec_3:ThickChord -> Strut:XSec_0:ThickChord Offset=0
